log		log.sinter
variable name string sinter

units           metal
boundary        p p p
atom_style  	atomic
neighbor        2.0 bin
neigh_modify    every 1 delay 2 check yes

##############################################
#       Setting up Grains/Crystallites       #
##############################################

variable latparam equal 4.0478   #if you care more about a fully dense crystal structure than studying sintering a smaller latparam than equilibirium can be used, for ex 3.3
variable fcc equal 4
########## Dimensions can be altered from cubic by modifying below
variable dim equal 300
variable x equal ${dim}
variable y equal ${dim}
variable z equal ${dim}
variable 1z1 equal 0
variable 1z2 equal 0
variable 1z3 equal 1
variable 1y1 equal 0
variable 1y2 equal 1
variable 1y3 equal 0
variable 1x1 equal 1
variable 1x2 equal 0
variable 1x3 equal 0
variable xsize1 equal "sqrt(v_1x1^2 + v_1x2^2 + v_1x3^2)"
variable ysize1 equal "sqrt(v_1y1^2 + v_1y2^2 + v_1y3^2)"
variable zsize1 equal "sqrt(v_1z1^2 + v_1z2^2 + v_1z3^2)"
variable sx equal "ceil(v_x/v_latparam/v_xsize1/2)"
variable sy equal "ceil(v_y/v_latparam/v_ysize1/2)"
variable sz equal "ceil(v_z/v_latparam/v_zsize1/2)"
variable lsx equal 150
#variable lsx equal "ceil(2*v_x/v_latparam/v_xsize1/2)"
variable lsy equal 150
#variable lsy equal "ceil(2*v_y/v_latparam/v_ysize1/2)"
variable lsz equal 150
#################variable lsz equal "ceil(2*v_z/v_latparam/v_zsize1/2)"

lattice fcc ${latparam} orient x  ${1x1} ${1x2} ${1x3} orient y  ${1y1} ${1y2} ${1y3} orient z  ${1z1} ${1z2} ${1z3} spacing ${xsize1} ${ysize1} ${zsize1}
#region box block -${lsx} ${lsx} -${lsy} ${lsy} -${lsz} ${lsz} units box
region box block -150 150 -150 150 -300 300 units box
create_box 1 box
region base block -150 150 -150 150 -300 0 units box
group base region base
create_atoms 1 region base
region layer1 block -150 150 -150 150 0 300 units box
group layer1 region layer1

region          lower block INF INF INF INF INF -250 units box
group           base region lower

pair_style eam/alloy
pair_coeff * * Al-2009.eam.alloy Al

########################## Grain size and filling parameters here ##########################

variable grainsize equal 40    #set approximate grain size
variable grainsig equal 10     #set some expected standard deviation of grain size
variable occupiedvolume equal 0.50  #what fraction of space will be occupied
variable expected equal 0.5*300*300*300*1200*4*8		# v_occupiedvolume*v_sx*v_sy*v_sz*v_fcc*2*2*2
variable grains equal 0   #initialize grain counter
run 0

variable counter loop 500000   #500k should be more than enough except for extreme circumstances. Also used to seed the next random grain.
label loop
variable randomr equal "normal(v_grainsize,v_grainsig,v_counter)"
variable holdr equal ${randomr}

if "${holdr} < 0" then "jump SELF negative" #else " "

variable randomx equal "random(-150+v_holdr,150-v_holdr,v_counter)"
variable randomy equal "random(-150+v_holdr,150-v_holdr,v_counter)"
variable randomz equal "random(-0+v_holdr,300-v_holdr,v_counter)"
variable rax1 equal "random(0,1,v_counter)"
variable ray1 equal "random(0,1,v_counter+1)"
variable raz1 equal "random(0,1,v_counter+2)"
variable rax2 equal "random(0,1,v_counter+3)"
variable ray2 equal "random(0,1,v_counter+4)"
variable raz2 equal "random(0,1,v_counter+5)"
variable drax equal "v_rax1-v_rax2"
variable dray equal "v_ray1-v_ray2"
variable draz equal "v_raz1-v_raz2"
variable theta equal "random(0,62.4,v_counter)"    #~62.4 for cubic misorientations, more realistic distribution could be implemented here
variable holdx equal ${randomx}
variable holdy equal ${randomy}
variable holdz equal ${randomz}

region grain sphere ${holdx} ${holdy} ${holdz} ${holdr} units box
group grain region grain
variable overlap equal "count(grain)"      #this variable will count atoms already in this space defined by the grain region

if "${overlap} > 0.5" then "jump SELF foundone" else " "   #skip grain creation if an atom is found
create_atoms 1 region grain
variable grains equal ${grains}+1   #counts how many grains/crystallites have been created
group grain delete                #clear grain group and region
group grain region grain
displace_atoms grain rotate ${holdx} ${holdy} ${holdz} ${drax} ${dray} ${draz} ${theta} units box

#write_data data.${name}.${counter}    #data file can be written to view grain placement process

label foundone
variable crit equal atoms/v_expected*100
variable current equal atoms

print "Created ${grains} grains ; Current Atoms = ${current} ; % Complete = ${crit}"   #The process should slow down considerably as %->100%

if "${crit} > 100" then "jump SELF after" else " "
region grain delete
group grain delete
label negative
print "${counter}"
print " "

next counter
jump SELF loop
label after
print "Done making initial grains"

write_restart init.restart

#######################################################
#                    SINTERING PROCESS                #
#######################################################

thermo          100
thermo_style custom atoms step temp pe etotal pxx pyy pzz lx ly lz
minimize 0.0 1.0e-6 1000 10000   #initial minimize to eliminate any overlapping atoms if they exist for some reason

change_box all boundary p p p
run 0
change_box all boundary p p p
minimize        1e-15 1.0e-15 1000 10000  #make sure that creating periodic boundaries did not create any issues
dump		iniatom all atom 1 ex1.ini.atom
run 		1
undump 	iniatom

#write_data 	data.${name}_init
######################################################################
#compute 3 all pe/atom
#compute 4 all stress/atom NULL ke pair
#dump ini all custom 10000 dump.all_${name}.* id type x y z vx vy vz c_3 c_4[1] c_4[2] c_4[3]    #dump all atoms
#dump sli all custom 500 dump.sli_${name}.* id type x y z vx vy vz c_3 c_4[1] c_4[2] c_4[3]     #and thin middle slice for viz
#dump_modify sli thresh y > -10
#dump_modify sli thresh y < 10
#Current temperatures and pressures are initial guesses for a Cu (Tm ~ 1,358 K) nanocrystalline system.
#final anneal temperature ~0.8Tm (1100K). Mid anneal temp ~0.65Tm (875K).
#applied compressive pressures 0.005 GPa and 0.01 GPa
########################################################################

variable initT equal 300
variable midT equal 1100
variable highT equal 1700
variable midP equal 1.5
variable highP equal 2
reset_timestep 0
velocity  layer1 create 600 12345

fix 	1 base setforce 0.0 0.0 0.0
#ramp up the up the temperature
fix npt1 layer1 npt temp ${initT} ${midT} 0.1 iso 1 1 1
dump sim all atom 1000 sinter.lammpstrj
dump_modify sim append yes
run 40000
unfix npt1
#hold temp and ramp up pressure

fix npt layer1 npt temp ${midT} ${midT} 0.1 iso 1 ${midP} 1
dump sim all atom 1000 sinter.lammpstrj
dump_modify sim append yes
run 40000
unfix npt

#bring temperature up to 0.8 Tm
fix npt layer1 npt temp ${midT} ${highT} 0.1 iso ${midP} ${midP} 1
dump sim all atom 1000 sinter.lammpstrj
dump_modify sim append yes
run 40000
unfix npt

#bring pressure up to 1 GPa
fix npt layer1 npt temp ${highT} ${highT} 0.1 iso ${midP} ${highP} 1
dump sim all atom 1000 sinter.lammpstrj
dump_modify sim append yes
run 40000
unfix npt

#dwell at high pressure and temperature
fix npt layer1 npt temp ${highT} ${highT} 0.1 iso ${highP} ${highP} 1
dump sim all atom 1000 sinter.lammpstrj
dump_modify sim append yes
run 100000
unfix npt

#ramp down both pressure and temp
fix npt layer1 npt temp ${highT} ${midT} 0.1 iso ${highP} ${midP} 1
dump sim all atom 1000 sinter.lammpstrj
dump_modify sim append yes
run 40000
unfix npt

#pressure and temp brought to target values
fix npt layer1 npt temp ${midT} ${initT} 0.1 iso ${midP} 1 1
dump sim all atom 1000 sinter.lammpstrj
dump_modify sim append yes
run 40000
unfix npt

#final dwell at equlibrium target P & T
fix npt base npt temp ${initT} ${initT} 0.1 iso 1 1 1
dump sim all atom 1000 sinter.lammpstrj
dump_modify sim append yes
run 100000
unfix npt
unfix 1
undump sim


#output data file

write_restart one.restart
print "Jobs done"
